// SBML level 2 version 1

model tRNAAminoacylation()
  // tRNAAminoacylation module

  // Compartments:
  compartment c = 0.00002;

  // Species:
  species ATP__c in c = 36234/c;
  species THR__c in c = 4460/c; THR__c is "L-Threonine";
  species MG479__c in c = 1/c;
  species MG479_aa__c in c = 25/c; MG479_aa__c is "MG479-AA";
  species MG_375_DIMER__c in c = 124/c; MG_375_DIMER__c is "threonyl-tRNA synthetase";
  species AMP__c in c = 1449/c;
  species PI__c in c = 7246/c; PI__c is "phosphate";
  species PPI__c in c = 5796/c; PPI__c is "diphosphate";

  // Parameters:
  k_tRnaAa_MG479 = 90;

  // Reactions:
  Aminoacylation_MG479: MG479__c + ATP__c + THR__c => MG479_aa__c + AMP__c + PPI__c; k_tRnaAa_MG479*MG479__c*ATP__c*THR__c*MG_375_DIMER__c*((1 + MG479__c*KM1^(-1))*(1 + ATP__c*KM2^(-1))*(1 + THR__c*KM3^(-1)))^(-1); Aminoacylation_MG479 is "Aminoacylation (MG479)";  // modifiers: MG_375_DIMER__c
    KM1 = 1; KM2 = 1; KM3 = 1;
end
